// SBML level 3 version 2
// Created with https://github.com/matthiaskoenig/sbmlutils.

model apixaban_intestine(PODOSE_api, SOLDOSE_api, Ka_dis_api, Ksol_dis_api, Mr_api, Vext, Vlumen, Vfeces, Vstomach, api_ext, api_lumen, api_feces, m1_lumen, m2_lumen, m7_lumen, m1_feces, m2_feces, m7_feces)
  // Model for apixaban absorption in the small intestine
  // Model for apixaban absorption
  // The content of this model has been carefully created in a manual research effort.
  // Terms of use
  // Copyright © 2026 Mariia Myshkina.
  // This work is licensed under a Creative Commons Attribution 4.0 International License.
  // Redistribution and use of any part of this model, with or without modification, are permitted provided that the following conditions are met:
  // Redistributions of this SBML file must retain the above copyright notice, this list of conditions and the following disclaimer.
  // Redistributions in a different form must reproduce the above copyright notice, this list of conditions and the following disclaimer in the documentation and/or other materials provided with the distribution.
  // This model is distributed in the hope that it will be useful, but WITHOUT ANY WARRANTY; without even the implied warranty of MERCHANTABILITY or FITNESS FOR A PARTICULAR PURPOSE.
  // hasTaxon taxonomy:9606 snomedct:337915000
  // hasProperty mamo:MAMO_0000046 ncit:C61308 ncit:C180619 ncit:C15299 ncit:C15720 GO:0007596
  // isDescribedBy doi:10.5281/zenodo.13987865
  // occursIn FMA:45615 BTO:0000545 ncit:C12736 FMA:7199 BTO:0000648
  // model units - substance: mmole, time: min, volume: litre, area: m2, length: metre, extent: mmole

  // Compartments:
  compartment Vext = 1 litre; Vext is "plasma";  // SBO:0000290 ncit:C13356 BTO:0000131
  compartment Vlumen = 1 litre;  // SBO:0000290 FMA:14586 UBERON:0018543
  compartment Vfeces = 1 litre;  // SBO:0000290 FMA:64183 ncit:C13234 BTO:0000440
  compartment Vstomach = 1 litre;  // SBO:0000290 FMA:7148 ncit:C12391 UBERON:0000945
  compartment Vapical = NaN; Vapical has m2; Vapical is "apical membrane (intestinal membrane enterocytes)";  // 2-D; SBO:0000290 FMA:84666 GO:0016324

  // Species:
  substanceOnly species $api_stomach in Vstomach = 0; api_stomach is "apixaban (stomach)";  // SBO:0000247 CHEBI:72296 pubchem.compound:10182969 inchikey:QNZCBYKSOIHPEH-UHFFFAOYSA-N
  species api_ext in Vext = 0; api_ext is "apixaban (plasma)";  // SBO:0000247 CHEBI:72296 pubchem.compound:10182969 inchikey:QNZCBYKSOIHPEH-UHFFFAOYSA-N
  species api_lumen in Vlumen = 0; api_lumen is "apixaban (intestinal volume)";  // SBO:0000247 CHEBI:72296 pubchem.compound:10182969 inchikey:QNZCBYKSOIHPEH-UHFFFAOYSA-N
  substanceOnly species api_feces in Vfeces = 0; api_feces is "apixaban (feces)";  // SBO:0000247 CHEBI:72296 pubchem.compound:10182969 inchikey:QNZCBYKSOIHPEH-UHFFFAOYSA-N
  species m1_lumen in Vlumen = 0; m1_lumen is "M1 (intestinal volume)";  // SBO:0000247 pubchem.compound:91667715 inchikey:HRIFVOGTDGFZKP-UHFFFAOYSA-N
  species m2_lumen in Vlumen = 0; m2_lumen is "M2 (intestinal volume)";  // SBO:0000247 pubchem.compound:10203943 inchikey:HGHLWAZFIGRAOT-UHFFFAOYSA-N
  species m7_lumen in Vlumen = 0; m7_lumen is "M7 (intestinal volume)";  // SBO:0000247
  substanceOnly species m1_feces in Vfeces = 0; m1_feces is "M1 (feces)";  // SBO:0000247 pubchem.compound:91667715 inchikey:HRIFVOGTDGFZKP-UHFFFAOYSA-N
  substanceOnly species m2_feces in Vfeces = 0; m2_feces is "M2 (feces)";  // SBO:0000247 pubchem.compound:10203943 inchikey:HGHLWAZFIGRAOT-UHFFFAOYSA-N
  substanceOnly species m7_feces in Vfeces = 0; m7_feces is "M7 (feces)";  // SBO:0000247

  // Parameters:
  F_api_abs = 0.66 dimensionless; F_api_abs is "fraction absorbed apixaban";  // SBO:0000002
  APIABS_Vmax = 0.1589798 mmole_per_min; APIABS_Vmax is "rate of apixaban absorption";  // SBO:0000009
  APIABS_50 = 25.83765 mg; APIABS_50 is "amount of apixaban when rate of absorption reaches 50% of maximal rate";  // SBO:0000027
  // 1.0: normal absorption corresponding to tablet under fasting conditions.
  // allows to change the velocity of absorption
  f_absorption = 1 dimensionless; f_absorption is "scaling factor for absorption rate";  // SBO:0000009
  MXEXC_k = 1.915286e-5 per_min; MXEXC_k is "rate of metabolite excretion";  // SBO:0000009
  PODOSE_api = 0 mg; PODOSE_api is "oral dose apixaban in tablet [mg]";  // SBO:0000002
  SOLDOSE_api = 0 mg; SOLDOSE_api is "oral dose apixaban in solution [mg]";  // SBO:0000002
  Ka_dis_api = 0.1904794 per_hr; Ka_dis_api is "Ka_dis [1/hr] dissolution apixaban in tablet";  // SBO:0000002
  Ksol_dis_api = 0.3352341 per_hr; Ksol_dis_api is "Ksol_dis [1/hr] dissolution apixaban in solution";  // SBO:0000002
  Mr_api = 459.5 g_per_mole; Mr_api is "Molecular weight apixaban [g/mole]";  // SBO:0000647
  absorption_api has mmole_per_min; absorption_api is "absorption apixaban";

  // Assignment rules:
  absorption_api := APIABS_Vmax*Vlumen*api_lumen/(APIABS_50/Mr_api + Vlumen*api_lumen);

  // Rate rules:
  PODOSE_api' = -dissolution_api_tabl*Mr_api;
  SOLDOSE_api' = -dissolution_api_sol*Mr_api;

  // Reactions:
  APIABS: api_lumen => api_ext; f_absorption*F_api_abs*absorption_api; APIABS is "absorption apixaban";  // SBO:0000655
  APIEXC: api_lumen => api_feces; (1 - f_absorption*F_api_abs)*absorption_api; APIEXC is "excretion apixaban (feces)";  // SBO:0000655
  M1EXC: m1_lumen => m1_feces; MXEXC_k*Vlumen*m1_lumen; M1EXC is "excretion M1 (feces)";  // SBO:0000655
  M2EXC: m2_lumen => m2_feces; MXEXC_k*Vlumen*m2_lumen; M2EXC is "excretion M2 (feces)";  // SBO:0000655
  M7EXC: m7_lumen => m7_feces; MXEXC_k*Vlumen*m7_lumen; M7EXC is "excretion M7 (feces)";  // SBO:0000655
  // Swallowing, dissolution of tablet, and transport into intestine. Overall process describing the rates of this processes.
  dissolution_api_tabl: $api_stomach => api_lumen; Ka_dis_api/(60 min_per_hr)*PODOSE_api/Mr_api; dissolution_api_tabl is "dissolution apixaban tablet";
  // Swallowing, dissolution of solution, and transport into intestine. Overall process describing the rates of this processes.
  dissolution_api_sol: $api_stomach => api_lumen; Ksol_dis_api/(60 min_per_hr)*SOLDOSE_api/Mr_api; dissolution_api_sol is "dissolution apixaban in solution";

  // Unit definitions:
  unit g_per_mole = gram / mole; g_per_mole is "g/mole";
  unit l_per_min = litre / (60 second); l_per_min is "l/min";
  unit m2 = metre^2; m2 is "meter^2";
  unit mM = 1e-3 mole / litre; mM is "mmole/liter";
  unit mg = 1e-3 gram;
  unit mg_per_min = 1e-3 gram / (60 second); mg_per_min is "mg/min";
  unit mg_per_s_l = 1e-3 gram / (second * litre); mg_per_s_l is "mg/s/l";
  unit min = 60 second;
  unit min_per_hr = 60 second / (3600 second); min_per_hr is "min/hour";
  unit mmole = 1e-3 mole;
  unit mmole_per_min = 1e-3 mole / (60 second); mmole_per_min is "mmole/min";
  unit mmole_per_min_l = 1e-3 mole / (60 second * litre); mmole_per_min_l is "mmole/min/l";
  unit per_hr = 1 / (3600 second); per_hr is "1/hr";
  unit per_min = 1 / (60 second); per_min is "1/min";
  unit per_mmole = 1 / (1e-3 mole); per_mmole is "1/mmole";
end
