// SBML level 3 version 2
// Created with https://github.com/matthiaskoenig/sbmlutils.

model apixaban_liver(Vext, Vli, Vmem, Vbi, Vlumen, api_ext, m1_ext, m1_lumen, m2_lumen, m7_ext, m7_lumen, fu_api)
  // Model for hepatic apixaban metabolism.
  // The content of this model has been carefully created in a manual research effort.
  // Terms of use
  // Copyright © 2026 Mariia Myshkina.
  // This work is licensed under a Creative Commons Attribution 4.0 International License.
  // Redistribution and use of any part of this model, with or without modification, are permitted provided that the following conditions are met:
  // Redistributions of this SBML file must retain the above copyright notice, this list of conditions and the following disclaimer.
  // Redistributions in a different form must reproduce the above copyright notice, this list of conditions and the following disclaimer in the documentation and/or other materials provided with the distribution.
  // This model is distributed in the hope that it will be useful, but WITHOUT ANY WARRANTY; without even the implied warranty of MERCHANTABILITY or FITNESS FOR A PARTICULAR PURPOSE.
  // hasTaxon taxonomy:9606 snomedct:337915000
  // hasProperty mamo:MAMO_0000046 ncit:C61308 ncit:C180619 ncit:C15299 ncit:C15720 GO:0007596
  // isDescribedBy doi:10.5281/zenodo.13987865
  // occursIn FMA:7197 BTO:0000759 ncit:C12392
  // model units - substance: mmole, time: min, volume: litre, area: m2, length: metre, extent: mmole

  // Compartments:
  compartment Vext = 1.5 litre; Vext is "plasma";  // SBO:0000290 ncit:C13356 BTO:0000131
  compartment Vli = 1.5 litre; Vli is "liver";  // SBO:0000290 FMA:7197 BTO:0000759 ncit:C12392
  compartment Vmem = NaN; Vmem has m2; Vmem is "membrane";  // 2-D; SBO:0000290 FMA:84669 GO:0016323
  compartment Vbi = 1 litre; Vbi is "bile";  // SBO:0000290 FMA:62971 ncit:C13192
  compartment Vlumen = 1 litre; Vlumen is "gut lumen";  // SBO:0000290 FMA:45615 BTO:0000545 ncit:C12736

  // Species:
  species api_ext in Vext = 0; api_ext is "apixaban (plasma)";  // SBO:0000247 CHEBI:72296 pubchem.compound:10182969 inchikey:QNZCBYKSOIHPEH-UHFFFAOYSA-N
  species api in Vli = 0; api is "apixaban (liver)";  // SBO:0000247 CHEBI:72296 pubchem.compound:10182969 inchikey:QNZCBYKSOIHPEH-UHFFFAOYSA-N
  species m1_ext in Vext = 0; m1_ext is "M1 (plasma)";  // SBO:0000247 pubchem.compound:91667715 inchikey:HRIFVOGTDGFZKP-UHFFFAOYSA-N
  species m1 in Vli = 0; m1 is "M1 (liver)";  // SBO:0000247 pubchem.compound:91667715 inchikey:HRIFVOGTDGFZKP-UHFFFAOYSA-N
  substanceOnly species m1_bi in Vbi = 0; m1_bi is "M1 (bile)";  // SBO:0000247 pubchem.compound:91667715 inchikey:HRIFVOGTDGFZKP-UHFFFAOYSA-N
  substanceOnly species m1_lumen in Vlumen = 0; m1_lumen is "M1 (gut)";  // SBO:0000247 pubchem.compound:91667715 inchikey:HRIFVOGTDGFZKP-UHFFFAOYSA-N
  species m2 in Vli = 0; m2 is "M2 (liver)";  // SBO:0000247 pubchem.compound:10203943 inchikey:HGHLWAZFIGRAOT-UHFFFAOYSA-N
  substanceOnly species m2_bi in Vbi = 0; m2_bi is "M2 (bile)";  // SBO:0000247 pubchem.compound:10203943 inchikey:HGHLWAZFIGRAOT-UHFFFAOYSA-N
  substanceOnly species m2_lumen in Vlumen = 0; m2_lumen is "M2 (gut)";  // SBO:0000247 pubchem.compound:10203943 inchikey:HGHLWAZFIGRAOT-UHFFFAOYSA-N
  species m7_ext in Vext = 0; m7_ext is "M7 (plasma)";  // SBO:0000247
  species m7 in Vli = 0; m7 is "M7 (liver)";  // SBO:0000247
  substanceOnly species m7_bi in Vbi = 0; m7_bi is "M7 (bile)";  // SBO:0000247
  substanceOnly species m7_lumen in Vlumen = 0; m7_lumen is "M7 (gut)";  // SBO:0000247

  // Parameters:
  MXEXBI_k = 0.0001 per_min; MXEXBI_k is "rate for edoxaban metabolites export in bile";  // SBO:0000009
  APIIM_k = 1000 per_min; APIIM_k is "rate apixaban import";  // SBO:0000186
  fu_api = 0.131 dimensionless; fu_api is "fraction unbound in plasma api";  // SBO:0000002
  API2M2_k = 0.020188 per_min; API2M2_k is "rate api -> m2 conversion";  // SBO:0000186
  API2M7_k = 0.008475021 per_min; API2M7_k is "rate api -> m7 conversion";  // SBO:0000186
  M22M1_Vmax = 0.1 mmole_per_min; M22M1_Vmax is "rate m2 -> m1 conversion";  // SBO:0000186
  M22M1_Km = 0.1 mmole; M22M1_Km is "rate m2 -> m1 conversion";  // SBO:0000186
  M1EX_k = 1000 per_min; M1EX_k is "rate M1 export";  // SBO:0000186
  M7EX_k = 1000 per_min; M7EX_k is "rate M7 export";  // SBO:0000186

  // Reactions:
  // Assuming fast equilibration.
  APIIM: api_ext -> api; APIIM_k*Vli*(api_ext*fu_api - api); APIIM is "apixaban import (APIIM)";  // SBO:0000655
  API2M2: api => m2; API2M2_k*Vli*api; API2M2 is "apixaban -> M2 (CYP3A4/5)";  // SBO:0000176
  API2M7: api => m7; API2M7_k*Vli*api; API2M7 is "apixaban -> M7 (CYP3A4/5)";  // SBO:0000176
  M22M1: m2 => m1; M22M1_Vmax*Vli*m2/(M22M1_Km + Vli*m2); M22M1 is "M2 -> M1 (SULT1A1)";  // SBO:0000176
  // Assuming fast equilibration.
  M1EX: m1 -> m1_ext; M1EX_k*Vli*(m1 - m1_ext); M1EX is "M1 export (M1EX)";  // SBO:0000655
  // Assuming fast equilibration.
  M7EX: m7 -> m7_ext; M7EX_k*Vli*(m7 - m7_ext); M7EX is "M7 export (M7EX)";  // SBO:0000655
  M1EXBI: m1 => m1_bi; MXEXBI_k*Vli*m1; M1EXBI is "M1 bile export";  // SBO:0000655
  M1EXEHC: m1_bi => m1_lumen; M1EXBI; M1EXEHC is "M1 enterohepatic circulation";  // SBO:0000655
  M2EXBI: m2 => m2_bi; MXEXBI_k*Vli*m2; M2EXBI is "M2 bile export";  // SBO:0000655
  M2EXEHC: m2_bi => m2_lumen; M2EXBI; M2EXEHC is "M2 enterohepatic circulation";  // SBO:0000655
  M7EXBI: m7 => m7_bi; MXEXBI_k*Vli*m7; M7EXBI is "M7 bile export";  // SBO:0000655
  M7EXEHC: m7_bi => m7_lumen; M7EXBI; M7EXEHC is "M7 enterohepatic circulation";  // SBO:0000655

  // Unit definitions:
  unit g_per_mole = gram / mole; g_per_mole is "g/mole";
  unit l_per_min = litre / (60 second); l_per_min is "l/min";
  unit m2 = metre^2; m2 is "meter^2";
  unit mM = 1e-3 mole / litre; mM is "mmole/liter";
  unit mg = 1e-3 gram;
  unit mg_per_s_l = 1e-3 gram / (second * litre); mg_per_s_l is "mg/s/l";
  unit min = 60 second;
  unit min_per_hr = 60 second / (3600 second); min_per_hr is "min/hour";
  unit mmole = 1e-3 mole;
  unit mmole_per_min = 1e-3 mole / (60 second); mmole_per_min is "mmole/min";
  unit mmole_per_min_l = 1e-3 mole / (60 second * litre); mmole_per_min_l is "mmole/min/l";
  unit per_min = 1 / (60 second); per_min is "1/min";
  unit per_mmole = 1 / (1e-3 mole); per_mmole is "1/mmole";
end
